OpenVSP model (file version 5), 7 components.
Geometry view with OpenVSP parameter names; values to 6 digits, angles in degrees, lengths in the model's unit.

Blank "Center"
  location (X Y Z) 0 0 0, rotation 0 0 0
  Mass: Point_Mass=8.332 Point_Mass_Flag=1

Blank "Motor1"
  location (X Y Z) 0.7725 0 0, rotation 0 0 0
  Mass: Point_Mass=0.55 Point_Mass_Flag=1

Blank "Motor2"
  location (X Y Z) -0.772 0 0, rotation 0 0 0
  Mass: Point_Mass=0.55 Point_Mass_Flag=1

Blank "Motor5"
  location (X Y Z) 0.38625 0.669 0, rotation 0 0 0
  Mass: Point_Mass=0.55 Point_Mass_Flag=1

Blank "Motor3"
  location (X Y Z) -0.38625 0.669 0, rotation 0 0 0
  Mass: Point_Mass=0.55 Point_Mass_Flag=1

Blank "Motor4"
  location (X Y Z) 0.38625 -0.669 0, rotation 0 0 0
  Mass: Point_Mass=0.55 Point_Mass_Flag=1

Blank "Motor6"
  location (X Y Z) -0.38625 -0.669 0, rotation 0 0 0
  Mass: Point_Mass=0.55 Point_Mass_Flag=1
